// COMSOL Multiphysics 6.3.0.290 model "myanmar_matlab_top1.mph"
// Outline of the model tree

Pairs
  p1: Contact "接触对 1" | source: boundaries 6; destination: boundaries 13
  p2: Identity "一致边界对 2" | source: boundaries 14, 15, 17-19; destination: boundaries 7-11

Geometry
  geom1 "几何 1" (3D, length unit km)
    blk1: Block "长方体 1"
      size = {1000, 1100, 50}
      pos = {-500, -500, -50}
      ax2 = {0.0, 0.0}
      layerbottom = off
      layertop = on
    ic1: InterpolationCurve "插值曲线 1"
      table = 
        {6.6414e+1, 3.4966e+2, 0}
        {7.4402e+1, 1.4917e+2, 0}
        {8.0036e+1, 8.9553e+1, 0}
        {1.0031e+2, -4.8136e+1, 0}
        {1.2402e+2, -1.7382e+2, 0}
      starttang = {0.00907969936788, -0.99995877868, 0}
      endtang = {0.189640713202, -0.981853553182, 0}
    ls3: LineSegment "线段 3" | vertex1 = ic1(1) points 2; vertex2 = ic1(1) points 1
    pt1: Point "点 1" | p = {190, -500, }
    pt2: Point "点 2" | p = {70, 600, 0}
    ls2: LineSegment "线段 2" | vertex1 = pt1(1) points 1; vertex2 = pt2(1) points 1
    ic2: InterpolationCurve "插值曲线 2"
      table = 
        {70, 600, 0}
        {6.6414e+1, 3.4966e+2, 0}
        {7.4402e+1, 1.4917e+2, 0}
        {8.0036e+1, 8.9553e+1, 0}
        {1.0031e+2, -4.8136e+1, 0}
        {1.2402e+2, -1.7382e+2, 0}
        {190, -500, 0}
      starttang = {-0.026080310514, -0.999659850851, 0}
      endtang = {0.183045903076, -0.983104367485, 0}
    copy3: Copy "复制 3" | input = ls3; keep = on; displx = 0; disply = 0; displz = -50
    wp7: WorkPlane "工作平面 7"
      planetype = vertices
      quickplane = yz
      planaredge = ic1(1) edges 1
      vertex1 = ls3(1) points 1
      vertex2 = ls3(1) points 2
      vertex3 = copy3(1) points 2
      transaxistype = x
      transedge = ls3(1) edges 1
      unite = on
      workplane3d = on
    wp1: WorkPlane "工作平面 1"
      planetype = transformed
      quickplane = yz
      planaredge = ic1(1) edges 1
      workplane = wp7
      transspecify = edge
      transaxistype = cartesian
      transax3 = {0, 0, 1}
      transrot = -9
      transedge = ls3(1) edges 1
      unite = on
      workplane3d = on
    copy1: Copy "复制 1" | input = ic2; keep = on; disply = 60; workplane = wp1
    ls4: LineSegment "线段 4" | vertex1 = pt1(1) points 1; vertex2 = copy1(1) points 2
    loft1: Loft "放样 1" | profile = copy1, ic2; errorcoord = on
    int1: Intersection "交集 1" | input = blk1, loft1; keep = on; intbnd = off; face = all
    del1: Delete "删除实体 1" | input = copy3, ic1, loft1, ls2, ls4
    cpt1: ConvertToPoint "转换为点 1" | input = int1
    ic3: InterpolationCurve "插值曲线 3"
      table = 
        {70, 600, 0}
        {6.6414e+1, 3.4966e+2, 0}
        {7.4402e+1, 1.4917e+2, 0}
        {8.0036e+1, 8.9553e+1, 0}
        {1.0031e+2, -4.8136e+1, 0}
        {1.2402e+2, -1.7382e+2, 0}
        {190, -500, 0}
      starttang = {-0.026080310514, -0.999659850851, 0}
      endtang = {0.183045903076, -0.983104367485, 0}
    copy2: Copy "复制 2" | input = ic3; keep = on; specify = pos; displx = 50/cos(82); newposvertices = cpt1(1) points 2
    loft2: Loft "放样 2" | profile = copy2, ic3
    par1: Partition "分割对象 1" | input = blk1; tool = loft2; keeptool = on; workplane = wp1
    wp2: WorkPlane "工作平面 2" | unite = on
    wp3: WorkPlane "工作平面 3" | quickz = -3.52774334962; unite = on
    wp4: WorkPlane "工作平面 4"
      quickplane = zx
      quickoffsettype = vertex
      offsetvertex = ls3(1) points 1
      quickz = -20
      planaredge = par1(1) edges 12
      edge = ls3(1) edges 1
      angle = 90
      unite = on
    wp5: WorkPlane "工作平面 5"
      planetype = transformed
      quickz = -20
      planaredge = par1(1) edges 12
      angle = 90
      workplane = wp4
      transdispl = {0, 0, 392.359770554}
      unite = on
    wp6: WorkPlane "工作平面 6"
      planetype = transformed
      quickplane = zx
      quickoffsettype = vertex
      quickz = -20
      angle = 90
      workplane = wp5
      transdispl = {0, 0, 1.00091778203}
      unite = on
    par3: Partition "Partition Objects 3" | input = loft2; partitionwith = workplane; workplane = wp2
    par4: Partition "Partition Objects 3.1" | input = par3; partitionwith = workplane; workplane = wp3
    par5: Partition "Partition Objects 3.1.1" | input = par4; partitionwith = workplane; workplane = wp5
    par6: Partition "Partition Objects 3.1.1.1" | input = par5; partitionwith = workplane; workplane = wp6
    dm1: DistanceMeasurement "距离测量 1"
      ent1 = ls3(1) points 2
      ent2 = ls3(1) points 1
      parname = geom1.dm1
      parnamevec = {geom1.dm1.x, geom1.dm1.y, geom1.dm1.z}
      parval = 526.640068392066
      parvalvec = {57.606, -523.48, 0}
    del4: Delete "删除实体 4" | input = ls3, pt1, pt2
    dif1: Difference "差集 1" | input = par1; input2 = par6
    spl2: Split "拆分 1.1" | input = dif1
    fin: Finalize "形成装配" | action = assembly

Materials
  mat1: Common "材料 1" on all domains
    def: def "基本"
      density = 1e3
    Enu: Enu "杨氏模量和泊松比"
      E = 33e9
      nu = 0.25

Physics
  solid: SolidMechanics "固体力学" on all domains
    dependent variable u = {u, v, w}
    StructuralTransientBehavior.StructuralTransientBehavior = Quasistatic
    lemm1: LinearElasticModel "线弹性材料 1" (default)
    free1: Free "自由 1" (default)
    init1: init "初始值 1" (default)
    dcnt1: SolidContact "接触 1" (default) | pn = ((min(1e-3*(5^niterCMP),1))*solid.dcnt1.E_char)/solid.hmin_dst
    dcont1: Continuity "连续性 1" (default)
    roll1: Roller "辊支承 1" on boundaries 1-3, 5, 16, 20-22
    disp1: Displacement2 "指定位移 1" on boundaries 13
      Direction = {free, prescribed, free}
      U0 = {0.5, 0.5, 0}
      coordinateSystem = sys1
      excludedEdges: edges 26, 28, 29, 33
    disp2: Displacement2 "指定位移 2" on boundaries 6
      Direction = {free, prescribed, free}
      U0 = {-0.5, 0.5, 0}
      coordinateSystem = sys1
      excludedEdges: edges 9, 11, 12, 15

Mesh
  mesh1 "网格 1"
    size: MeshSizeDefault "大小" | hmax = 110; hmin = 19.8; hcurve = 0.6; hnarrow = 0.5; hgrad = 1.5
    ftri1: FreeTri "自由三角形网格 1" on boundaries 6, 13
      dis1: Distribution "分布 1" on edges 9, 15, 26, 33
      dis2: Distribution "分布 2" on edges 11, 12, 28, 29 | numelem = 10
    ftri2: FreeTri "自由三角形网格 2" on boundaries 7-11, 14, 15, 17-19
      size1: Size "大小 1" on boundaries 7-11, 14, 15, 17-19
      dis1: Distribution "分布 1" on edges 10, 13, 16, 19, 27, 30, 34, 37 | numelem = 70
      dis3: Distribution "分布 3" on edges 17, 18, 35, 36 | numelem = 50
      dis4: Distribution "分布 4" on edges 21, 39
    ftri3: FreeTri "自由三角形网格 3" (disabled) on boundaries 4, 12
      size1: Size "大小 1" on boundaries 4, 12
    ftet1: FreeTet "自由四面体网格 1" on remaining entities

Studies
  std1 "研究 1"
    stat: Stationary "稳态"

Solver configurations
  sol1 "解 1" (study std1)
    v1: Variables "因变量 1"
      comp1_u: Field "位移场 (comp1.u)" | scalemethod = manual; scaleval = 1e-2*1487493.944104142
    s1: Stationary "稳态求解器 1"
      fc1: FullyCoupled "全耦合 1" | linsolver = d1; dtech = ddog
      d1: Direct "建议的直接求解器 (solid)" | linsolver = pardiso; pivotperturb = 1.0E-9; nliniterrefine = on

Datasets
  dset1: Solution | solution = sol1

Tables
  tbl1: Table "表格 1"
    // 点计算 1
    位移场，X 分量 (km), 点: 41
    2.24073e-06

Plots
  pg1: PlotGroup3D "应力 (solid)" | data = dset1
    vol1: Volume "体 1" (disabled) | expr = v
      def: Deform "变形" | expr = {u, v, w}
    slc1: Slice "切面 1" | expr = u; unit = cm; quickplane = xy; quickzmethod = coord